Main.ModelSetup.LabSpecificData = {


 #path BODY_MODEL_CONFIG_FILE "BodyModelConfig.any"

 #path MOCAP_MARKER_PROTOCOL_FILE "MarkerProtocol.any"


 #path MOCAP_EXTRA_DRIVERS_FILE "ExtraDrivers.any"

 Main.Studies.InverseDynamicStudy.InverseDynamics.Criterion.UpperBoundOnOff = Off;

 // Try to solve the issue with hand models falling throught wrapping torus' in the hand.
 // This unfortunally, make the model run a bit slower.
 Main.Studies.InverseDynamicStudy.Kinematics.Main.Studies.InverseDynamicStudy.Kinematics.SmallStepAssumptionOnOff = Off;


 // Parameter optimization


 #path MOCAP_C3DSETTINGS "C3DSettings.any"
  // Use normal force plates
//  #path MOCAP_FORCE_PLATE_FILE "ForcePlates.any"

 Gravity = 9.81*{0,-1,0};


  // This adds different segment length as design variables to
  // to the parameter identification study (Main.Studies.ParameterIdentification)
  // This allows the segment length to be optimized in based on the markers/motion//
  OptimizeAnthropometricsOnOff OptimizeAntropometricsOnOff (
     RIGHT_THUMB_MC_LENGTH =ON,
     RIGHT_THUMB_PP_LENGTH =ON,
     RIGHT_THUMB_DP_LENGTH =ON,
     RIGHT_FINGER2_MC_LENGTH =ON,
     RIGHT_FINGER2_PP_LENGTH =ON,
     RIGHT_FINGER2_MP_LENGTH =ON,
     RIGHT_FINGER2_DP_LENGTH =ON,
     RIGHT_FINGER3_MC_LENGTH =ON,
     RIGHT_FINGER3_PP_LENGTH =ON,
     RIGHT_FINGER3_MP_LENGTH =ON,
     RIGHT_FINGER3_DP_LENGTH =ON,
     RIGHT_FINGER4_MC_LENGTH =ON,
     RIGHT_FINGER4_PP_LENGTH =ON,
     RIGHT_FINGER4_MP_LENGTH =ON,
     RIGHT_FINGER4_DP_LENGTH =ON,
     RIGHT_FINGER5_MC_LENGTH =ON,
     RIGHT_FINGER5_PP_LENGTH =ON,
     RIGHT_FINGER5_MP_LENGTH =ON,
     RIGHT_FINGER5_DP_LENGTH =ON,
  ) ={};


//  AnyFolder OptimizeAntropometrics =
//  {
//   CreateDesVar PelvisWidth( ENABLE = ON,
//     NAME = PelvisWidth,
//     PARAMETER = Main.HumanModel.Anthropometrics.SegmentDimensions.PelvisWidth
//   ) = {};
//
//  };

  // Include functions to generate a video:
  // -> Run `Study.VideoTool.Preview` to preview the camera view.
  // -> Run `Study.VideoTool.Create_Video` to generate video from the analysis.
  #include "CreateVideo.any"


};
